! post_all_stress.mac -- every element at the last result set:
! elem, SEQV, mean stress p = (SX+SY+SZ)/3, alpha (SVAR 84). Centroid values.
/POST1
SET,LAST
ALLSEL
*GET,NE_,ELEM,0,COUNT
*GET,EMAX_,ELEM,0,NUM,MAX
ETABLE,ESEQ,S,EQV
ETABLE,ESX,S,X
ETABLE,ESY,S,Y
ETABLE,ESZ,S,Z
ETABLE,EA84,SVAR,84
*DIM,EID_,ARRAY,EMAX_
*DIM,ESQ_,ARRAY,EMAX_
*DIM,EXX_,ARRAY,EMAX_
*DIM,EYY_,ARRAY,EMAX_
*DIM,EZZ_,ARRAY,EMAX_
*DIM,EAL_,ARRAY,EMAX_
*VFILL,EID_(1),RAMP,1,1
*VGET,ESQ_(1),ELEM,1,ETAB,ESEQ
*VGET,EXX_(1),ELEM,1,ETAB,ESX
*VGET,EYY_(1),ELEM,1,ETAB,ESY
*VGET,EZZ_(1),ELEM,1,ETAB,ESZ
*VGET,EAL_(1),ELEM,1,ETAB,EA84
*CFOPEN,all_stress,csv
*VWRITE
('elem,seqv,sx,sy,sz,alpha')
*VWRITE,EID_(1),ESQ_(1),EXX_(1),EYY_(1),EZZ_(1),EAL_(1)
(F8.0,5(',',E24.16))
*CFCLOS
FINISH
