! t_growth_cylinder_ecology_4region_clsm.dat --- extends
! t_growth_cylinder_ecology_4region.dat: same 2x2 (theta x Z) 4-region
! curved-shell patch, but regions B/C/D (mat 3/4/5) are now REAL Day-1
! (Tag=1) CLSM compositions for three of this repo's four clinical
! conditions (RESEARCH_MODEL.md sec.0: CH/DH/CS/DS), from
! data/heine_species_distribution_biofilm.xlsx, replacing the original
! deck's "not measured data" synthetic seeds C/D. Region A (mat 2, the
! all-zero -> INIT_ECO_IF_ZERO default) is left UNCHANGED as a regression
! baseline.
!
!   mat 3 (region B) = CS  Commensal/Static   (same seed
!                       t_growth_ecology_clsm_phi.dat and
!                       t_growth_cylinder_ecology_clsm.dat already verified)
!   mat 4 (region C) = CH  Commensal/HOBIC    (new)
!   mat 5 (region D) = DS  Dysbiotic/Static   (new)
!
! Dysbiotic/HOBIC (DH) is NOT the 4th real region here -- its Day-1 "all
! cells" sheet block has NO measurement at all (not zero, genuinely blank
! in the workbook) for F. nucleatum and P. gingivalis, confirmed by reading
! the raw rows directly. Fabricating a value for missing data would
! misrepresent the workbook, so region A keeps its existing placeholder
! role instead of becoming a guessed DH. See
! ecology_4region_reference_clsm.py's own docstring for the same note.
!
! psi(1:5) is still the 0.999 placeholder for every region, same
! justification as every other real-CLSM deck in this directory (the
! workbook's "only living cells" ratio is a different, unbounded quantity
! -- see t_growth_ecology_clsm_phi.dat's header).
!
! INTERFACE BONDING (fixed and re-run 2026-09-29): the two volumes used
! to be bonded with NUMMRG, which merged only a few coincident nodes -- the
! growth layer was essentially floating, so every stress this deck produced
! before that date is invalid (incl. the condition-vs-position comparison in
! plot_condition_paired.py). Now VGLUE + one shared mesh, same as
! t_growth_cylinder_ecology_4region_all_real_clsm.dat. The alpha values below
! are from the OLD constants (c*=100, Hill on, alpha*=100). With c*=25, no
! Hill gate, alpha*=0 (ecology_4region_reference_clsm.py): default 4.8811175330e-03,
! CS 4.8943827130e-03, CH 4.9036186081e-03, DS 4.8772026944e-03 -- ANSYS matches
! at all 768 points per region. Paired with the all-real deck
! (plot_condition_paired.py): theta contrasts +0.01 %/-0.02 %, CH moved in
! theta and Z 0.28 %, spread between conditions 0.4 %.
!
! Independent reference: ecology_4region_reference_clsm.py (10 chained
! ecology_step calls, dt=1e-5, THETA_DEMO):
!   A (mat2, default):        alpha = 4.5687349611e-03  (unchanged baseline)
!   B (mat3, CS):              alpha = 4.6144769029e-03
!   C (mat4, CH):               alpha = 4.6920293146e-03
!   D (mat5, DS):               alpha = 4.3556778678e-03
! all four comfortably under the 0.01 convergence threshold, and now three
! of the four correspond to genuinely different, real measured biofilm
! compositions rather than synthetic stand-ins.
!
! Run (from a writable working directory, e.g. F:\biofilm_upf_kusepy2, with
! ansys_usermat/coupling/material_server.py listening on 127.0.0.1:8765):
!   "%AWP_ROOT222%\ANSYS\bin\winx64\ANSYS222.exe" -b -custom .\ANSYS.exe ^
!       -i t_growth_cylinder_ecology_4region_clsm.dat -o out_cylinder_ecology_4region_clsm.txt

FINISH
/CLEAR
/TITLE, biofilm USERMAT - 4-region cylindrical shell, 3 real CLSM conditions
/PREP7

ET,1,SOLID185
KEYOPT,1,2,0

R_IN  = 4.0
R_MID = 4.3
R_OUT = 4.4
LEN   = 0.15
ARC   = 5

CYLIND,R_IN,R_MID,0,LEN,0,ARC        ! volume 1: substrate
CYLIND,R_MID,R_OUT,0,LEN,0,ARC       ! volume 2: growth layer
VGLUE,ALL                            ! share the R_MID face -> bonded mesh

! ---- substrate (mat 1): no ecology, no growth
TB,USER,1,1,6
TBDATA,1,0.2E-3,0.0,5.0E3,0.0,0.0,0.0
TB,STATE,1,,10
TBDATA,1,1.0,0.0,0.0, 0.0,1.0,0.0
TBDATA,7,0.0,0.0,1.0
TBDATA,10,0.0

! ---- growth-layer materials (mat 2,3,4,5): identical constants/theta,
! differ only in TB,STATE seed
TB,USER,2,1,29
TBDATA,1,0.2E-3,0.0,5.0E3,0.0,0.0,0.0
TBDATA,7,0.0,1.0,50.0,1.34,-0.18,1.79
TBDATA,13,1.17,2.58,3.51,2.73,0.71,2.10
TBDATA,19,0.37,2.05,-0.15,3.56,0.16,0.12
TBDATA,25,0.32,1.49,2.10,2.41,2.50

TB,USER,3,1,29
TBDATA,1,0.2E-3,0.0,5.0E3,0.0,0.0,0.0
TBDATA,7,0.0,1.0,50.0,1.34,-0.18,1.79
TBDATA,13,1.17,2.58,3.51,2.73,0.71,2.10
TBDATA,19,0.37,2.05,-0.15,3.56,0.16,0.12
TBDATA,25,0.32,1.49,2.10,2.41,2.50

TB,USER,4,1,29
TBDATA,1,0.2E-3,0.0,5.0E3,0.0,0.0,0.0
TBDATA,7,0.0,1.0,50.0,1.34,-0.18,1.79
TBDATA,13,1.17,2.58,3.51,2.73,0.71,2.10
TBDATA,19,0.37,2.05,-0.15,3.56,0.16,0.12
TBDATA,25,0.32,1.49,2.10,2.41,2.50

TB,USER,5,1,29
TBDATA,1,0.2E-3,0.0,5.0E3,0.0,0.0,0.0
TBDATA,7,0.0,1.0,50.0,1.34,-0.18,1.79
TBDATA,13,1.17,2.58,3.51,2.73,0.71,2.10
TBDATA,19,0.37,2.05,-0.15,3.56,0.16,0.12
TBDATA,25,0.32,1.49,2.10,2.41,2.50

! mat 2 (region A): all-zero -> INIT_ECO_IF_ZERO default -- UNCHANGED
TB,STATE,2,,26
TBDATA,1,1.0,0.0,0.0,0.0,1.0,0.0
TBDATA,7,0.0,0.0,1.0,0.0,0.0,0.0
TBDATA,13,0.0,0.0,0.0,0.0,0.0,0.0
TBDATA,19,0.0,0.0,0.0,0.0,0.0,0.0
TBDATA,25,0.0,0.0

! mat 3 (region B): REAL CS - Commensal/Static Day-1 CLSM seed
TB,STATE,3,,26
TBDATA,1,1.0,0.0,0.0,0.0,1.0,0.0
TBDATA,7,0.0,0.0,1.0,0.0,0.0,0.0
TBDATA,13,0.0,0.0,0.118119009,0.0194597518,0.768110315,0.0718475718
TBDATA,19,0.022462353,1.00000000E-06,0.999,0.999,0.999,0.999
TBDATA,25,0.999,0.0

! mat 4 (region C): REAL CH - Commensal/HOBIC Day-1 CLSM seed
TB,STATE,4,,26
TBDATA,1,1.0,0.0,0.0,0.0,1.0,0.0
TBDATA,7,0.0,0.0,1.0,0.0,0.0,0.0
TBDATA,13,0.0,0.0,0.931959147,0.0163135914,0.0230199182,0.0287063431
TBDATA,19,0.0,1.00000000E-06,0.999,0.999,0.999,0.999
TBDATA,25,0.999,0.0

! mat 5 (region D): REAL DS - Dysbiotic/Static Day-1 CLSM seed
TB,STATE,5,,26
TBDATA,1,1.0,0.0,0.0,0.0,1.0,0.0
TBDATA,7,0.0,0.0,1.0,0.0,0.0,0.0
TBDATA,13,0.0,0.0,0.0765892716,0.0811208942,0.30272547,0.0868505178
TBDATA,19,0.452712846,1.00000000E-06,0.999,0.999,0.999,0.999
TBDATA,25,0.999,0.0

MSHKEY,0

! Volumes are picked by their bounding face, not by number: VGLUE
! renumbers its output, and VSEL,LOC by radius selects nothing.
! One ESIZE for both volumes: they share the R_MID face, and whichever is
! swept first fixes that face mesh for the other. ESIZE_C = LEN/6 keeps the
! Z = LEN/2 region split on element boundaries (no centroid on the cut).
ESIZE_C = LEN/6
CSYS,1                                 ! circumferential lines: an even count (16),
LSEL,S,LOC,Y,ARC/2                     ! so the theta = ARC/2 split is on element
LESIZE,ALL,,,16                        ! boundaries too
LSEL,ALL
CSYS,0

MAT,1
CSYS,1
ASEL,S,LOC,X,R_IN
VSLA,S
CSYS,0
ESIZE,ESIZE_C
VSWEEP,ALL

MAT,2
CSYS,1
ASEL,S,LOC,X,R_OUT
VSLA,S
CSYS,0
ESIZE,ESIZE_C
VSWEEP,ALL
ALLSEL

! ---- split the growth layer into a 2x2 (theta x Z) grid of 4 regions -------
CSYS,1
ESEL,S,MAT,,2
ESEL,R,CENT,Y,ARC/2,ARC
ESEL,R,CENT,Z,0,LEN/2
EMODIF,ALL,MAT,3                       ! upper-theta, lower-Z -> region B (CS)

ALLSEL
ESEL,S,MAT,,2
ESEL,R,CENT,Y,0,ARC/2
ESEL,R,CENT,Z,LEN/2,LEN
EMODIF,ALL,MAT,4                       ! lower-theta, upper-Z -> region C (CH)

ALLSEL
ESEL,S,MAT,,2
ESEL,R,CENT,Y,ARC/2,ARC
ESEL,R,CENT,Z,LEN/2,LEN
EMODIF,ALL,MAT,5                       ! upper-theta, upper-Z -> region D (DS)
CSYS,0
ALLSEL

NUMCMP,NODE
NUMCMP,ELEM

! ---- boundary conditions -- identical to the base ecology deck -------------
CSYS,1
ASEL,S,LOC,X,R_IN
NSLA,S,1
D,ALL,ALL,0
ALLSEL
CSYS,0

NSEL,S,LOC,Z,0
D,ALL,UZ,0
NSEL,S,LOC,Z,LEN
D,ALL,UZ,0
ALLSEL
FINISH

/SOLU
ANTYPE,STATIC
NLGEOM,ON
TIME,1.0E-4
AUTOTS,OFF
NSUBST,10
OUTRES,ALL,LAST
OUTRES,SVAR,LAST
SOLVE
FINISH

/POST1
SET,LAST
/OUTPUT,growth_result_cylinder_ecology_4region_clsm,txt
ETABLE,SEQV,S,EQV
PRETAB,SEQV
ESEL,S,MAT,,2
PRESOL,SVAR,10                ! alpha, region A (default)
ESEL,S,MAT,,3
PRESOL,SVAR,10                ! alpha, region B (CS)
ESEL,S,MAT,,4
PRESOL,SVAR,10                ! alpha, region C (CH)
ESEL,S,MAT,,5
PRESOL,SVAR,10                ! alpha, region D (DS)
ALLSEL
/OUTPUT
FINISH
