! t_growth_cylinder_shell.dat --- two-layer curved-shell smoke test for usermat_biofilm.f
! ANSYS Mechanical APDL.  See RUNBOOK.md for the full Windows procedure.
!   Windows (IKMHIWI03, v222), from a writable working directory:
!     "%AWP_ROOT222%\ANSYS\bin\winx64\ANSYS222.exe" -b -custom .\ANSYS.exe ^
!         -i t_growth_cylinder_shell.dat -o out_cyl.txt
!
! STATUS, 2026-08-20 (IKMHIWI03): RESOLVED for the working value below
! (alpha=0.01, converges clean, 0 errors) -- corrected 2026-09-07 after this
! header was found stale (it still said "does not converge yet" after the
! fix landed; only the TBDATA alpha comment and README.md had been updated).
! What's genuinely still open is narrower than this header used to imply:
! alpha=0.01 converges; alpha>=0.015 still fails with the same corner
! distortion (see "WHY THIS CASE" below and README.md). That is a separate,
! unresolved question (a real capacity/buckling limit, not a meshing bug --
! see the "two-lobe bulge" note near the alpha TBDATA line) and is NOT what
! blocks using this geometry at the working alpha. See
! t_growth_cylinder_ecology.dat for a live-ecology-driven extension of this
! same geometry (ansys_usermat/coupling/README.md next-steps #4), which
! stays well under the 0.01 threshold by construction.
!
! 2026-09-07 UPDATE on the alpha>=0.015 question: a 5th attempt, of a
! different KIND than the 4 below (all of which changed BC/mesh at the
! distorting corner and made it worse every time) -- a pure solver-
! robustness option, LNSRCH,ON (Newton-Raphson line search), touching no
! geometry/BC/mesh at all. Tried alone at alpha=0.015: errors 3 -> 1,
! and the run now COMPLETES (the single remaining distortion, still on a
! different element, 2454, self-recovers via automatic bisection rather
! than aborting). Tried combined with a higher NSUBST cap (200 instead of
! 80): no further change, same 1 error. Tried combined with STABILIZE
! (nonlinear stabilization): WORSE (2 errors, run did not reach /POST1).
! Tried combined with a finer initial substep (NSUBST,20,80,4 instead of
! 10,80,2 -- the one remaining error hit at SUBSTEP 4, so a gentler ramp
! seemed worth a shot): also WORSE (element 2454 failed twice, 3 total
! errors, PROBLEM TERMINATED, did not complete). A mesh-only diagnostic
! (ELIST/NLIST, no solve) located element 2454 precisely: theta~7.2deg
! (near the theta=0 free edge), near the R_MID interface, away from
! Z=0/Z=LEN -- a DIFFERENT corner than 5101 (Z=0, mid-arc). Retried the
! 4th pre-LNSRCH attempt (theta-edge NROTAT+D,,UY,0), this time WITH
! LNSRCH,ON, now that the theta edge is specifically implicated: still
! WORSE (element 5941, 3 errors, did not complete) -- the theta-edge
! constraint hurts regardless of LNSRCH. A 7th attempt tried the softer
! version explicitly flagged as worth trying: same theta-edge NROTAT+
! D,,UY,0 + LNSRCH,ON, but excluding the Z=0/Z=LEN corner nodes so only
! genuine mid-edge nodes are constrained (on the theory the corner node,
! not the edge condition itself, was the problem). Still WORSE (element
! 11821 -- a third, different element again -- 3 errors, repeated
! bisection down to dt=0.0625 without recovering, PROBLEM TERMINATED).
! Seven attempts beyond plain LNSRCH now, all worse, including the
! specific "soft corner-excluded" fix this deck's own header used to
! suggest trying. Paused here for real -- plain LNSRCH,ON with the
! original NSUBST,10,80,2 schedule stands as the best result found. See
! t_growth_cylinder_shell_a015_lnsrch.dat
! (the working alpha=0.015+LNSRCH deck, kept as a separate file rather than
! changing this deck's own verified alpha=0.01 baseline) and
! out_a015_lnsrch.txt / growth_cylinder_a015_lnsrch_result.txt for the
! evidence. Not "genuinely clean" (0 errors) the way alpha=0.01 is, but a
! real, substantial improvement over the 3-error hard failure alpha=0.015
! was before -- worth trying LNSRCH,ON on other decks that hit this class
! of failure (local distortion under an otherwise well-posed BC/mesh) too.
!
! Original debugging narrative below, kept for the record. Two real bugs on
! the way to a running deck were found and fixed
! (see the "geometry" and "mesh" comments below): (1) VGLUE silently drops
! MAT attributes across its own volume renumbering, (2) a per-volume element
! size that is coarser than the thinner layer's own thickness produces a
! degenerate mesh regardless of load. After both fixes the deck builds,
! meshes, and material assignment is confirmed correct (ESEL,S,MAT,,2 now
! selects the right elements) -- but the solve still hits "element highly
! distorted" (different elements each mesh refinement: 1216/1461/2 at
! ESIZE=0.033, then 6061/1298/6232/6182 at ESIZE=0.05), independent of
! alpha magnitude (failed at both 0.05 and 0.02) and of substep count
! (failed with NSUBST up to 200 and AUTOTS,ON).
!
! Added a symmetry-style UZ=0 constraint at the two flat axial-end faces
! (Z=0, Z=LEN) -- see the "boundary condition" section below -- and errors
! dropped from 12 to 3, now all on a SINGLE element (5101) instead of 4
! different ones. Diagnosed via a throwaway mesh-only deck (ELIST/NLIST,
! no solve, no disk cost): element 5101 sits exactly at the intersection of
! three things at once -- the R_MID bonded interface with the substrate,
! the new Z=0 axial-end constraint, and the growth layer's innermost
! through-thickness element (only 2 elements span the 0.1 layer). That
! triple coincidence -- interface + new BC + thin/high-aspect-ratio element,
! all on the aggressively-growing material -- reads like a local
! over-constraint/singularity, not a load-ramping problem.
!
! Tried both follow-ups the same day, each a small, targeted change (see
! git history for the exact diffs -- both were reverted, not left in):
!   - Exclude the R_MID interface node row from the Z=0/Z=LEN constraint
!     (theory: relax the over-constrained corner) -> WORSE: 3 errors/1
!     element became 6 errors/2 elements, now in the substrate (1261/1299).
!   - Local through-thickness refinement (LSEL by LENGTH~0.1 to grab just
!     the growth layer's 4 radial lines, LESIZE,,,6 instead of the implicit
!     2, circumferential/axial ESIZE untouched) -> ALSO WORSE: 6 errors/2
!     elements (1531/1556, substrate again), and it ate disk down to
!     0.14 GB free.
! So: the plain uniform Z=0/Z=LEN constraint (no exclusion, no local
! refinement) remains the best result reached -- 3 errors, all on element
! 5101. Disk fixed later the same day (ANSYS work moved to F:, ~3.7 TB
! free -- see RUNBOOK.md), so a 4th attempt was cheap to try: also
! constrain the flat theta-edges via NROTAT + D,,UY,0. Also worse (3->12
! errors, 4 new elements at the theta-edge corners). Reverted -- see the
! "boundary condition" section's own note for the detail and the pattern
! across all 4 attempts: constraining a face broadly (Z=0/Z=LEN) helped,
! but constraining specifically AT a corner where interface + BC + thin
! element coincide has hurt every time it's been tried. Four targeted
! attempts without reaching convergence; the next one should probably not
! be another blanket face constraint but either a corner-specific
! (mid-edge-only) condition, a fundamentally different constraint scheme,
! or a second pair of eyes.
!
! WHY THIS CASE
! -------------
! t_growth_constrained.dat and t_growth_free.dat are both a UNIT CUBE with a
! UNIFORM alpha field -- closed-form-checkable, but geometrically nothing
! like a tooth surface (see slides_1005.tex, "this cube is a math check, not
! the biofilm's actual shape"). This deck is one step toward geometric
! realism: a curved SUBSTRATE (tooth-surface proxy, no growth) bonded to a
! thin GROWTH LAYER (biofilm, alpha != 0) on top of it.
!
! THIS IS NOT A CLOSED-FORM VERIFICATION. Two curved, bonded, differently-
! loaded layers have no simple analytic answer the way F=I does. Treat this
! as a SMOKE TEST / qualitative capability check: does the two-material,
! curved-geometry, bonded-interface case (a) build, mesh, and solve without
! error, and (b) produce a physically sensible pattern -- growth layer in
! compression (it wants to expand and is bonded down), substrate picking up
! bending/hoop stress from being pushed on non-uniformly by the curved growth
! layer. A real mesh-convergence study (refine ESIZE, check stress
! stabilizes) is NOT done here and should precede using this for anything
! quantitative -- see README.md.
!
! GEOMETRY (cylindrical coords, CSYS,1: X=radius, Y=theta[deg], Z=axial)
!   substrate:    R_IN  = 4.0  ->  R_MID = 4.3   (tooth-proxy, alpha = 0)
!   growth layer: R_MID = 4.3  ->  R_OUT = 4.4   (biofilm,     alpha = 0.05)
!   axial length LEN = 3.0, arc ARC = 60 deg (an open patch, not a full ring
!   -- a tooth surface is not a closed cylinder, so don't mesh it like one)
!
! BOUNDARY CONDITIONS
!   Inner radius (R_IN, the substrate's root-facing surface): fully bonded/
!   fixed, D,ALL,ALL,0 -- stands in for "attached to the rest of the tooth".
!   Everything else (outer growth surface, flat axial ends, flat theta
!   edges) is traction-free. This is deliberately the crudest BC that still
!   lets the growth layer push against something -- not meant to model a
!   real periodontal support.

FINISH
/CLEAR
/TITLE, biofilm USERMAT - two-layer cylindrical shell (tooth-surface smoke test)
/PREP7

ET,1,SOLID185
KEYOPT,1,2,0                 ! B-bar; see t_growth_constrained.dat's KEYOPT sweep

R_IN  = 4.0
R_MID = 4.3
R_OUT = 4.4
LEN   = 3.0
ARC   = 60

! ---- geometry: two radial layers of a partial hollow cylinder --------------
! No VGLUE. Two prior attempts both failed to get MAT to stick through it:
!   (1) VATT by volume ID before VGLUE -- VGLUE renumbers its output (input
!       volumes 1,2 come out as 1,3; confirmed via out_cyl.txt) and the
!       glued replacement volume 3 is evidently a NEW entity that does not
!       inherit volume 2's attribute, so everything silently fell back to
!       the default material (ESEL,S,MAT,,2 selected zero elements).
!   (2) VATT by centroid radius (CSYS,1, VSEL,LOC,X) after VGLUE -- selected
!       zero volumes too; APDL's LOC selection for a volume apparently
!       checks its defining keypoints, not a true centroid, and this
!       curved wedge's keypoints sit exactly at R_IN/R_MID/R_MID/R_OUT (the
!       corners), not at any in-between radius.
! Simplest robust path: skip VGLUE, mesh each volume independently under
! its own default material pointer (MAT,n before VSWEEP), then bond the two
! independently-meshed volumes by merging their coincident interface nodes
! with NUMMRG -- ordinary technique for two structured sweep-meshes sharing
! one geometrically (not topologically) identical face.
CYLIND,R_IN,R_MID,0,LEN,0,ARC        ! volume 1: substrate (tooth proxy)
CYLIND,R_MID,R_OUT,0,LEN,0,ARC       ! volume 2: growth layer (biofilm)

! ---- substrate material (mat 1): same hyperelastic law, alpha = 0 (no growth)
TB,USER,1,1,6
TBDATA,1,0.2E-3,0.0,5.0E3,0.0,0.0,0.0
TB,STATE,1,,10
TBDATA,1,1.0,0.0,0.0, 0.0,1.0,0.0     ! Fv(1,1..3), Fv(2,1..3) -- max 6 values/TBDATA call
TBDATA,7,0.0,0.0,1.0                  ! Fv(3,1..3)
TBDATA,10,0.0                         ! alpha = 0: substrate does not grow

! ---- growth-layer material (mat 2): same law, alpha = 0.05 (biofilm growth)
TB,USER,2,1,6
TBDATA,1,0.2E-3,0.0,5.0E3,0.0,0.0,0.0
TB,STATE,2,,10
TBDATA,1,1.0,0.0,0.0, 0.0,1.0,0.0
TBDATA,7,0.0,0.0,1.0
TBDATA,10,0.01                        ! alpha (growth driver) -- reduced from the
                                       ! cube cases' 0.05: a same-day alpha sweep
                                       ! (disk now cheap on F:) found this deck's
                                       ! convergence threshold is between 0.01
                                       ! (converges clean) and 0.015 (6 errors,
                                       ! same corner-distortion pattern as before).
                                       ! 0.01 is the largest value that reaches a
                                       ! genuinely clean solve (0 errors) for this
                                       ! geometry/BC/mesh -- kept as the working
                                       ! value rather than chasing full alpha=0.05.

! ---- mesh -- coarse, smoke test only ---------------------------------------
! Each volume swept under its own default MAT pointer (MAT,n), independently
! -- not VATT. Interface nodes bonded afterwards with NUMMRG (see note above).
! Separate ESIZE per volume: the growth layer is only 0.1 thick (R_MID to
! R_OUT), so the substrate's ESIZE=0.15 would be LARGER than the layer it's
! meshing -- a guaranteed degenerate, near-flat single element through the
! thickness. That is almost certainly what the persistent "element highly
! distorted" failures (always the same 3 elements, independent of alpha)
! actually were: a bad element at t=0, not a load-ramping problem.
MSHKEY,0

MAT,1
VSEL,S,VOLU,,1
ESIZE,0.15                            ! substrate: 0.3 thick -> 2 elements through
VSWEEP,1

! Tried local refinement: LSEL by LENGTH (~0.1) to grab just the growth
! layer's 4 through-thickness lines, LESIZE,,,6 for 6 divisions instead of
! 2, leaving circumferential/axial ESIZE untouched. Result: no better --
! 3 errors/1 element (5101) became 6 errors/2 elements (1531, 1556, now
! back in the substrate), and it ate disk down to 0.14 GB free (the mesh
! more than doubled in element count). Reverted. Three BC/mesh directions
! tried today (axial-end UZ=0: helped; excluding the interface row from
! it: hurt; local through-thickness refinement: hurt) without reaching
! convergence -- worth a fundamentally different BC or a real FE person's
! eyes rather than more guessing, next time this is picked up.
MAT,2
VSEL,S,VOLU,,2
ESIZE,0.05                            ! growth layer: 0.1 thick -> 2 elements through
VSWEEP,2

ALLSEL
NUMMRG,NODE,1.0E-4                    ! bond the two layers: merge coincident
                                       ! nodes at the shared R_MID interface
NUMCMP,NODE
NUMCMP,ELEM

! ---- boundary condition: bond the substrate's inner (root-facing) surface --
CSYS,1                                ! cylindrical: X=radius, Y=theta, Z=axial
ASEL,S,LOC,X,R_IN
NSLA,S,1
D,ALL,ALL,0
ALLSEL
CSYS,0

! ---- added 2026-08-20, first distortion-fix attempt: restrain the two flat
! axial-end faces against out-of-plane (Z) motion. A real biofilm patch on a
! tooth surface continues past what this deck models -- it is not a free-
! standing island in the axial direction -- so a free-flapping Z edge here is
! an artifact of the finite patch, not the physics. This is the simplest,
! axis-aligned (no local-CS rotation needed) piece of that: symmetry-style
! UZ=0 at Z=0 and Z=LEN. The flat theta-edges (also free-standing artifacts)
! are NOT addressed yet -- that needs a rotated nodal CS and is a separate
! next step if this alone is not enough.
! Tried excluding the R_MID interface node row from this constraint (the
! element that was distorting, 5101, sat right where this BC met that
! interface) -- made it WORSE (3 errors/1 element -> 6 errors/2 elements,
! now in the substrate). So that corner needed MORE support, not less;
! the interface row's Z-constraint was stabilizing, not the cause. Reverted
! to the plain, uniform Z=0/Z=LEN constraint below.
NSEL,S,LOC,Z,0
D,ALL,UZ,0
NSEL,S,LOC,Z,LEN
D,ALL,UZ,0

! Tried 2026-08-20, second session (disk fixed, so this was cheap to try):
! also constrain the flat theta-edges (theta=0, theta=ARC) the same way,
! via NROTAT to align each edge's nodal CS with the active cylindrical
! CSYS then D,,UY,0 (circumferential = 0). Same reasoning as the Z=0/Z=LEN
! fix above -- but the RESULT was the opposite: WORSE, not better. Errors
! went 3 -> 12, with 4 NEW distorting elements (1501/6454/1537/6422), all
! at the theta-edge corners in both materials. Reverted.
!
! Pattern emerging across all 4 targeted attempts so far (this one, the
! two from the first session): adding a constraint AT a corner where
! material interface + boundary condition + thin/aggressive-growth
! elements coincide tends to make THAT corner worse, even when the same
! kind of constraint elsewhere (the plain Z=0/Z=LEN faces, away from the
! theta-edge corners) helped. Worth trying a softer condition at corners
! specifically (e.g. only constrain mid-edge nodes, not corner nodes) next
! time, rather than another blanket face constraint.
ALLSEL
FINISH

! ---- solve -------------------------------------------------------------
/SOLU
ANTYPE,STATIC
NLGEOM,ON
TIME,5.0                     ! eta=0 in both materials here, so TIME is just a
                              ! pseudo-time for substepping, not a real dt
AUTOTS,ON                     ! let the solver bisect/ramp -- alpha applied in
NSUBST,10,80,2                 ! one shot at full substep count distorted elements
OUTRES,ALL,LAST                ! disk is critically low -- only keep the final
OUTRES,SVAR,LAST                ! substep's results, not every intermediate one
SOLVE
FINISH

! ---- report --------------------------------------------------------------
/POST1
SET,LAST
/OUTPUT,growth_cylinder_result,txt
PRNSOL,U,COMP
NLIST,ALL,,,XYZ                       ! nodal coords, for plotting the deformed
                                       ! shape against undeformed radius/theta/z
ETABLE,SEQV,S,EQV
PRETAB,SEQV
! diagnostic: is alpha actually reaching the growth-layer elements?
ESEL,S,MAT,,2
PRESOL,SVAR,10                ! alpha, growth-layer elements only
PRESOL,SVAR,1                  ! Fv(1,1), growth-layer elements only
PRESOL,S,COMP
ALLSEL
/OUTPUT
FINISH
