! t_growth_ecology_clsm_phi.dat --- real-ANSYS check of the 0D Hamilton
! ecology hook seeded from real CLSM composition, not the placeholder
! default. coupling/README.md next-steps #4's first open item (partial):
!   "Seed ustatev(15:26) from real CLSM-measured composition per Gauss
!    point instead of INIT_ECO_IF_ZERO's fixed default."
!   "%AWP_ROOT222%\ANSYS\bin\winx64\ANSYS222.exe" -b -custom .\ANSYS.exe ^
!       -i t_growth_ecology_clsm_phi.dat -o out_ecology_clsm_phi.txt
! The -custom argument must point at the executable built with this repo's
! usermat_biofilm.f + usermat_py_hook.f + biofilm_py_eval.c; without it
! ANSYS runs its own stock material and the check is meaningless.
! material_server.py must be listening on 127.0.0.1:8765 (or
! BIOFILM_PY_HOST/BIOFILM_PY_PORT set in this shell) before SOLVE runs.
!
! WHAT'S DIFFERENT FROM t_growth_ecology.dat
! -------------------------------------------
! phi(1:5) below is the real 2026-09-08 Day-1 (Tag=1) CLSM composition for
! the Commensal/Static condition from data/heine_species_distribution_
! biofilm.xlsx ("Static all cells" sheet block, mean over replicates),
! NOT the fixed placeholder default INIT_ECO_IF_ZERO would otherwise seed.
! Species order: [S. oralis, A. naeslundii, Veillonella, F. nucleatum,
! P. gingivalis] (RESEARCH_MODEL.md sec.1), normalized to sum 0.999999 the
! same way ecology_jax.default_initial_state() normalizes its own
! placeholder (phi0 fills the remaining 1e-6 void fraction).
!
! psi(1:5) is NOT from real data here -- kept at the same 0.999 constant
! INIT_ECO_IF_ZERO already used. The workbook also has an "only living
! cells" sheet block, and plot_heine_phi_psi.py computes psi_plot = L/phi
! from it, but that ratio is explicitly a "relative viability/enrichment"
! (its own docstring's words, unbounded, values up to ~30 seen), NOT the
! model's own psi_i in [0,1] (fraction of species i's own biomass that is
! alive -- RESEARCH_MODEL.md sec.1's "membrane-intact ratio"). Computing
! Day-1 L/phi for this same condition gives values >1 for two species
! (S. oralis 1.20, Veillonella 1.08), which cannot be a real psi_i --
! confirms these are different quantities, not interchangeable. Using
! L/phi here anyway (even clipped) would misrepresent measured data as
! something it doesn't measure. Left as a placeholder on purpose rather
! than silently worked around; theta (interaction parameters) is also
! still THETA_DEMO, not TMCMC-calibrated -- both remain open items.
!
! EXPECTED AFTER THE HILL-GATE FIX (2026-10-01; gate off no longer zeroes
! species 5's interaction -- coupling/ODE_TMCMC_CROSSCHECK.md). Not yet run
! on ANSYS; the block below it is the ANSYS-confirmed pre-fix baseline.
! To be re-run at Keio. From ecology_deck_reference.py:
!   g_new(phi)   = [0.117805684, 0.0191946486, 0.769424741, 0.0714843241, 0.0220849833]
!   g_new(psi)   = [0.994387216, 0.994376545, 0.994546466, 0.994382142, 0.994376765]
!   g_new(gamma) = 159.893565
!   alpha_new    = 4.972516806e-04
!   SX=SY=SZ     = -3.00047014e-01
!
! EXPECTED, CURRENT (2026-09-29; c*=25, no Hill gate, alpha*=0 --
! ecology_constants.py; from ecology_deck_reference.py). Confirmed on real
! ANSYS the same day (F:\biofilm_upf_kusepy build, -smp -np 4): 0 errors,
! SX and SVAR(10), SVAR(15:26) equal to these at printed precision.
!   g_new(phi)   = [0.117861202, 0.0192489159, 0.769481597, 0.0715397892, 0.0218628777]
!   g_new(phi0)  = 5.61866218e-06
!   g_new(psi)   = [0.994386636, 0.994376455, 0.994542955, 0.994381792, 0.994376072]
!   g_new(gamma) = 148.880299
!   alpha_new    = 4.972502801e-04
!   SX=SY=SZ     = -3.00046169e-01
!   SXY=SYZ=SXZ  = 0
!
! The EXPECTED block below is from the OLD constants (c*=100, Hill gate
! K=0.05 n=4, alpha*=100) and is kept only as history.
!
! EXPECTED (independently computed in Python, ecology_jax.ecology_step
! from this exact initial state, THETA_DEMO, dt=1e-5, k_alpha=50 --
! reproducible via the composition-extraction + closed-form check run
! 2026-09-08). NOTE alpha_new uses living_fraction_total of the *new*
! (post-step) g, not the initial one -- matching t_growth_ecology.dat's own
! established convention; an earlier draft of this comment used the old
! state's phi_tot by mistake and did not match the real ANSYS run until
! corrected:
!   g_new(phi)   = [0.117588820, 0.019366110, 0.769781000, 0.071426930, 0.021831520]
!   g_new(phi0)  = 5.61866218e-06
!   g_new(psi)   = [0.994296930, 0.994136490, 0.994506440, 0.994359740, 0.994350770]
!   g_new(gamma) = 334.038179
!   phi_tot(g_new) = 0.994455176   (sum_i phi_i(new)*psi_i(new))
!   alpha_new    = 4.972275879e-04
!   SX=SY=SZ     = -3.0003249e-01
!   SXY=SYZ=SXZ  = 0
!
! CONFIRMED on real ANSYS 2026-09-08 (F:\biofilm_upf_kusepy, -smp -np 1):
! 0 errors; SVAR(10)=0.49723E-003, SX=SY=SZ=-0.30003, SVAR(15:26) all match
! the above to displayed precision -- see growth_result_ecology_clsm_phi.txt.

FINISH
/CLEAR
/TITLE, biofilm USERMAT - 0D Hamilton ecology hook, real CLSM phi seed
/PREP7

! ---- single 8-node hex, unit cube -----------------------------------------
ET,1,SOLID185
KEYOPT,1,2,0                 ! B-bar

BLOCK,0,1,0,1,0,1
ESIZE,1
VMESH,1

! ---- user material -----------------------------------------------------
! prop: C10,C01,D1,eta,mtype,kUsePy | kStateMat,kUseEcology,k_alpha,theta(1:3)
!       | theta(4:9) | theta(10:15) | theta(16:20)
TB,USER,1,1,29
TBDATA,1,1.0,0.0,0.01,0.0,0.0,0.0
TBDATA,7,0.0,1.0,50.0,1.34,-0.18,1.79
TBDATA,13,1.17,2.58,3.51,2.73,0.71,2.1
TBDATA,19,0.37,2.05,-0.15,3.56,0.16,0.12
TBDATA,25,0.32,1.49,2.1,2.41,2.5

! state: ustatev(1:9)=Fv (identity), ustatev(10)=alpha (0), ustatev(11:14)
! unused (kStateMat=0), ustatev(15:26) = real CLSM-seeded ecology state g:
!   15:19 = phi(1:5), 20 = phi0, 21:25 = psi(1:5), 26 = gamma
TB,STATE,1,,26
TBDATA,1,1.0,0.0,0.0, 0.0,1.0,0.0
TBDATA,7,0.0,0.0,1.0
TBDATA,10,0.0
TBDATA,15,0.118119010,0.0194597500,0.768110310,0.0718475700,0.0224623500,1.00000000E-06
TBDATA,21,0.999,0.999,0.999,0.999,0.999
TBDATA,26,0.0

! ---- fully constrained: forces F = I at every integration point ------------
NSEL,ALL
D,ALL,UX,0
D,ALL,UY,0
D,ALL,UZ,0
NSEL,ALL
FINISH

! ---- solve -----------------------------------------------------------------
/SOLU
ANTYPE,STATIC
NLGEOM,ON
TIME,1.0E-5                  ! must equal the dt_h used for the Python reference
NSUBST,1,1,1                 ! exactly one substep -- one ecology step, no more
OUTRES,ALL,ALL
OUTRES,SVAR,ALL
SOLVE
FINISH

! ---- report ----------------------------------------------------------------
/POST1
SET,LAST
ESEL,S,ELEM,,1
/OUTPUT,growth_result_ecology_clsm_phi,txt
PRESOL,S,COMP
PRESOL,SVAR,10                ! alpha
PRESOL,SVAR,15                ! g(1)  = phi(1)
PRESOL,SVAR,16                ! g(2)  = phi(2)
PRESOL,SVAR,17                ! g(3)  = phi(3)
PRESOL,SVAR,18                ! g(4)  = phi(4)
PRESOL,SVAR,19                ! g(5)  = phi(5)
PRESOL,SVAR,20                ! g(6)  = phi0
PRESOL,SVAR,21                ! g(7)  = psi(1)
PRESOL,SVAR,22                ! g(8)  = psi(2)
PRESOL,SVAR,23                ! g(9)  = psi(3)
PRESOL,SVAR,24                ! g(10) = psi(4)
PRESOL,SVAR,25                ! g(11) = psi(5)
PRESOL,SVAR,26                ! g(12) = gamma
/OUTPUT
FINISH
