! t_growth_ecology_multi.dat --- multi-element extension of
! t_growth_ecology.dat: same fully-constrained unit cube, same closed-form
! answer, but subdivided into 8 SOLID185 elements instead of 1.
!
!   "%AWP_ROOT222%\ANSYS\bin\winx64\ANSYS222.exe" -b -custom .\ANSYS.exe ^
!       -i t_growth_ecology_multi.dat -o out_ecology_multi.txt
! Same -custom / material_server.py preconditions as t_growth_ecology.dat.
!
! STATUS, 2026-09-07 (IKMHIWI03): RESOLVED. First attempt hung
! indefinitely under ANSYS's default parallel execution. Two real bugs
! were found and fixed along the way -- see coupling/README.md's
! 2026-09-07 notes and coupling/biofilm_py_eval.c /
! coupling/material_server.py for the full detail:
!
!   1. biofilm_py_eval.c kept one global, unsynchronised TCP connection
!      (g_fd) shared by every caller -- a same-process data race if
!      ANSYS ever evaluates the material routine from multiple threads.
!      Fixed with a mutex (SRWLOCK / pthread_mutex_t) serialising the
!      whole request/response exchange.
!   2. THE ACTUAL ROOT CAUSE: ANSYS parallelises this solve via MPI, not
!      (only) OpenMP threads -- a multi-element job spawned 4 separate
!      ANSYS.exe processes (confirmed via the "BAD TERMINATION ... RANK
!      0/1/2/3" messages from a killed hung run), each opening its OWN
!      persistent connection to material_server.py. Plain
!      socketserver.TCPServer services one accepted connection's entire
!      lifetime before ever accepting the next, so rank 0's connection
!      monopolised the server and ranks 1-3 hung forever waiting for a
!      response that could never come. Fixed by switching the server to
!      socketserver.ThreadingTCPServer (material_server.py's new
!      `_Server` class).
!
! With both fixes, this deck now completes in ~12s under ANSYS's default
! thread/rank count (no -np 1 needed): 0 errors, and all 8 elements
! independently reproduce t_growth_ecology.dat's closed-form answer
! exactly -- confirming ustatev(15:26) isolation per Gauss point AND that
! the bridge holds up under genuine multi-process concurrency. Two
! diagnostic decks used to isolate the two bugs are kept alongside this
! one: t_growth_multi_baseline.dat (8 elements, no Python hook at all --
! converged in 2.5s even before any fix, proving the bug was specific to
! the socket bridge, not multi-element custom-USERMAT execution in
! general) and t_growth_kusepy_multi.dat (8 elements, material hook only,
! no ecology -- also hung before the ThreadingTCPServer fix and also
! converges (~2.6s) after it, proving the bug was in the shared bridge
! infrastructure, not the ecology-specific Fortran code).
!
! WHY THIS CASE
! -------------
! t_growth_ecology.dat proves the ecology hook's own math is right at ONE
! Gauss point. It does not exercise anything about MANY Gauss points calling
! the socket bridge in the same solve: does ustatev(15:26) stay isolated
! per integration point (no cross-talk between elements), does the server
! hold up under several times the request volume in one substep, does
! nothing race or interleave badly when ANSYS's Newton loop fires calls
! from multiple elements. This is the first thing that would actually break
! going from a single-element smoke test toward a real mesh -- so verify it
! before spending effort on spatially-varying composition/theta per element
! (not done here; see coupling/README.md next-steps).
!
! Every node is still fully fixed (D,ALL,UX/UY/UZ,0 on the whole selection),
! so F = I at every one of the 8 elements' integration points regardless of
! mesh density -- the closed-form answer from t_growth_ecology.dat still
! applies, now checked at all 8 elements independently. theta and the
! initial composition are the SAME material (matID 1) for every element, so
! this deliberately does NOT test spatial variation -- only isolation and
! scale of the per-Gauss-point coupling.
!
! EXPECTED, CURRENT (2026-09-29; c*=25, no Hill gate, alpha*=0 --
! ecology_constants.py; from ecology_deck_reference.py). Confirmed on real
! ANSYS the same day (F:\biofilm_upf_kusepy build, -smp -np 4): 0 errors,
! SX and SVAR(10), SVAR(15:26) equal to these at printed precision.
!   g_new(phi)   = [0.324413278, 0.324477081, 0.216325849, 0.134778172, 5.61865569e-10]
!   g_new(phi0)  = 5.61866218e-06
!   g_new(psi)   = [0.994414435, 0.994416299, 0.994402578, 0.994386882, 0.994374863]
!   g_new(gamma) = 149.988332
!   alpha_new    = 4.972015871e-04
!   SX=SY=SZ     = -3.00016816e-01
!   SXY=SYZ=SXZ  = 0
!
! The EXPECTED block below is from the OLD constants (c*=100, Hill gate
! K=0.05 n=4, alpha*=100) and is kept only as history.
!
! EXPECTED (confirmed under ANSYS's default thread/rank count): identical
! to t_growth_ecology.dat, at every one of the 8 elements (see that file's
! header for the exact reference numbers):
!   alpha_new = 4.971361400e-04, SX=SY=SZ = -2.9997736e-01, shear = 0,
!   g_new as listed there -- reproduced independently via
!   ecology_jax.default_initial_state() -> ecology_jax.ecology_step(...,
!   THETA_DEMO, 1e-5).

FINISH
/CLEAR
/TITLE, biofilm USERMAT - 0D Hamilton ecology hook, multi-element
/PREP7

! ---- unit cube, 2x2x2 = 8 SOLID185 elements --------------------------------
ET,1,SOLID185
KEYOPT,1,2,0                 ! B-bar

BLOCK,0,1,0,1,0,1
ESIZE,0.5
VMESH,1

! ---- user material (identical to t_growth_ecology.dat) --------------------
TB,USER,1,1,29
TBDATA,1,1.0,0.0,0.01,0.0,0.0,0.0
TBDATA,7,0.0,1.0,50.0,1.34,-0.18,1.79
TBDATA,13,1.17,2.58,3.51,2.73,0.71,2.1
TBDATA,19,0.37,2.05,-0.15,3.56,0.16,0.12
TBDATA,25,0.32,1.49,2.1,2.41,2.5

TB,STATE,1,,26
TBDATA,1,1.0,0.0,0.0, 0.0,1.0,0.0
TBDATA,7,0.0,0.0,1.0
TBDATA,10,0.0

! ---- fully constrained: forces F = I at every element's integration points -
NSEL,ALL
D,ALL,UX,0
D,ALL,UY,0
D,ALL,UZ,0
NSEL,ALL
FINISH

! ---- solve -----------------------------------------------------------------
/SOLU
ANTYPE,STATIC
NLGEOM,ON
TIME,1.0E-5
NSUBST,1,1,1
OUTRES,ALL,ALL
OUTRES,SVAR,ALL
SOLVE
FINISH

! ---- report: all 8 elements, not just element 1 ----------------------------
/POST1
SET,LAST
ESEL,ALL
/OUTPUT,growth_result_ecology_multi,txt
PRESOL,S,COMP
PRESOL,SVAR,10                ! alpha
PRESOL,SVAR,15                ! g(1)  = phi(1)
PRESOL,SVAR,16                ! g(2)  = phi(2)
PRESOL,SVAR,17                ! g(3)  = phi(3)
PRESOL,SVAR,18                ! g(4)  = phi(4)
PRESOL,SVAR,19                ! g(5)  = phi(5)
PRESOL,SVAR,20                ! g(6)  = phi0
PRESOL,SVAR,21                ! g(7)  = psi(1)
PRESOL,SVAR,22                ! g(8)  = psi(2)
PRESOL,SVAR,23                ! g(9)  = psi(3)
PRESOL,SVAR,24                ! g(10) = psi(4)
PRESOL,SVAR,25                ! g(11) = psi(5)
PRESOL,SVAR,26                ! g(12) = gamma
/OUTPUT
FINISH
