! t_growth_free.dat --- traction-free growth-path verification for usermat_biofilm.f
! ANSYS Mechanical APDL.  See RUNBOOK.md for the full Windows procedure.
!   Windows (IKMHIWI03, v222), from a writable working directory:
!     "%AWP_ROOT222%\ANSYS\bin\winx64\ANSYS222.exe" -b -custom .\ANSYS.exe ^
!         -i t_growth_free.dat -o out_free.txt
!   Linux:
!     ansys222 -b -custom ./ansys.e -i t_growth_free.dat -o out_free.txt
! The -custom argument must point at the executable built with usermat_biofilm.f;
! without it ANSYS runs its own stock material and the check is meaningless.
!
! WHY THIS CASE
! -------------
! t_growth_constrained.dat fixes every node (F = I exactly) and checks the
! RESISTED-growth branch: the element wants to expand, can't, and the closed
! form predicts a hydrostatic COMPRESSION.  This deck is the opposite extreme:
! only the six rigid-body modes are removed (a minimal 3-2-1 constraint), so
! the element is free to expand under its own growth drive.
!
! With zero traction on every face, the equilibrium state has NO elastic
! stretch at all: the element simply grows into the shape Fg already wants,
! so F = Fg exactly, Fe = I, and stress is EXACTLY ZERO -- independent of
! alpha and independent of eta (there is no stress to drive viscous flow
! either, so Fv stays at I throughout). This is a second, complementary
! closed-form check: t_growth_constrained.dat would still pass even with a
! sign error that only shows up when the element is allowed to actually
! deform (e.g. Fg applied with the wrong sign inside Fe = F Fg^-1 could still
! cancel out under full kinematic constraint but will NOT cancel out here).
!
! EXPECTED (any alpha, any eta -- see README.md's "free (traction-free)
! growth" section; NOT in reference_values.json, whose schema/tests assume
! every case is the F=I constrained scenario -- see the note there)
!   Je       =  1.0                          (elastic volume ratio: unchanged)
!   J        =  (1+alpha)^3                  (all volume change is growth)
!   SX=SY=SZ=SXY=SYZ=SXZ = 0                  (exactly, to solver tolerance)
!
! A nonzero stress here means either Fg or Fg^-1 is wired with the wrong
! sign/transpose, or the growth branch is coupled to the elastic branch
! incorrectly -- a bug that t_growth_constrained.dat alone cannot catch,
! since full constraint can mask sign errors that only appear once the
! element is free to move.

FINISH
/CLEAR
/TITLE, biofilm USERMAT - free (traction-free) isotropic growth (closed-form check)
/PREP7

! ---- single 8-node hex, unit cube -----------------------------------------
ET,1,SOLID185
KEYOPT,1,2,0                 ! B-bar (default); see README for the KEYOPT sweep

BLOCK,0,1,0,1,0,1
ESIZE,1
VMESH,1

! ---- user material ---------------------------------------------------------
! prop: C10, C01, D1, eta, mtype, kUsePy
TB,USER,1,1,6
TBDATA,1,0.2E-3,0.0,5.0E3,0.0,0.0,0.0

! state: ustatev(1:9)=Fv (row-major, initialised to I), ustatev(10)=alpha
TB,STATE,1,,10
TBDATA,1,1.0,0.0,0.0, 0.0,1.0,0.0        ! Fv(1,1..3), Fv(2,1..3) -- TBDATA takes max 6 values/call
TBDATA,7,0.0,0.0,1.0                     ! Fv(3,1..3) -- easy to lose the tail if you cram >6 into one line
TBDATA,10,0.05                          ! <-- alpha (growth driver)

! ---- minimal (3-2-1) rigid-body constraint only -- growth is otherwise free
! Node selection is by location, not APDL's internal node numbering, so this
! is robust to any mesher renumbering.
NSEL,S,LOC,X,0
NSEL,R,LOC,Y,0
NSEL,R,LOC,Z,0
D,ALL,UX,0
D,ALL,UY,0
D,ALL,UZ,0                    ! origin node: pin translation (3 DOF)

NSEL,S,LOC,X,1
NSEL,R,LOC,Y,0
NSEL,R,LOC,Z,0
D,ALL,UY,0
D,ALL,UZ,0                    ! +X node: remove rotation about Y and Z (2 DOF)

NSEL,S,LOC,X,0
NSEL,R,LOC,Y,1
NSEL,R,LOC,Z,0
D,ALL,UZ,0                    ! +Y node: remove rotation about X (1 DOF)

NSEL,ALL
FINISH

! ---- solve -----------------------------------------------------------------
/SOLU
ANTYPE,STATIC
NLGEOM,ON
TIME,5.0                     ! must match dt used for the viscous reference
NSUBST,1,10,1
OUTRES,ALL,ALL
OUTRES,SVAR,ALL               ! state vars need their own OUTRES flag -- ALL,ALL alone omits them
SOLVE
FINISH

! ---- report ----------------------------------------------------------------
/POST1
SET,LAST
ESEL,S,ELEM,,1
/OUTPUT,growth_free_result,txt
PRESOL,S,COMP                ! SX SY SZ SXY SYZ SXZ at the integration points
PRESOL,SVAR,1                 ! Fv(1,1)
PRESOL,SVAR,2                 ! Fv(1,2)
PRESOL,SVAR,3                 ! Fv(1,3)
PRESOL,SVAR,4                 ! Fv(2,1)
PRESOL,SVAR,5                 ! Fv(2,2)
PRESOL,SVAR,6                 ! Fv(2,3)
PRESOL,SVAR,7                 ! Fv(3,1)
PRESOL,SVAR,8                 ! Fv(3,2)
PRESOL,SVAR,9                 ! Fv(3,3)
PRESOL,SVAR,10                ! alpha
/OUTPUT
FINISH
