*HEADING
 biofilm_visco UMAT (eta=0, NeoHooke C10/D1) growth via TEMP=alpha=0.1.
 Same W and same growth magnitude as the built-in NeoHooke+*Expansion job.
*NODE
1,0.,0.,0.
2,1.,0.,0.
3,1.,1.,0.
4,0.,1.,0.
5,0.,0.,1.
6,1.,0.,1.
7,1.,1.,1.
8,0.,1.,1.
*ELEMENT, TYPE=C3D8, ELSET=EALL
1,1,2,3,4,5,6,7,8
*NSET, NSET=NALL, GENERATE
1,8,1
*NSET, NSET=BOT
1,2,3,4
*SOLID SECTION, ELSET=EALL, MATERIAL=BV
*MATERIAL, NAME=BV
*USER MATERIAL, CONSTANTS=5
1.678524e-4, 0.0, 120.0, 0.0, 0.0
*DEPVAR
9
*INITIAL CONDITIONS, TYPE=TEMPERATURE
NALL, 0.0
*STEP, NLGEOM=YES, INC=100
*STATIC
0.1,1.0,1e-6,0.2
*BOUNDARY
BOT, ENCASTRE
*TEMPERATURE
NALL, 0.1
*OUTPUT, FIELD
*ELEMENT OUTPUT
S, SDV
*END STEP
